*Heading
** Job name: Job-1_UMAT Model name: Model-1
** Generated by: Abaqus/CAE 6.14-1
*Preprint, echo=NO, model=NO, history=NO, contact=NO
**
** PARTS
**
*Part, name=Part-1
*Node
      1,          -5.,          -5.,           3.
      2,          -5.,         -3.5,           3.
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*Element, type=C3D8
  1,  34,  35,  46,  45,   1,   2,  13,  12
  2,  35,  36,  47,  46,   2,   3,  14,  13
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*Nset, nset=Set-1, generate
   1,  264,    1
*Elset, elset=Set-1, generate
   1,  140,    1
*Orientation, name=Ori-2
          0.,           1.,           0.,           1.,           0.,           0.
3, 0.
** Section: Section-1
*Solid Section, elset=Set-1, orientation=Ori-2, material=Material-1
,
*End Part
**
**
** ASSEMBLY
**
*Assembly, name=Assembly
**
*Instance, name=Part-1-1, part=Part-1
*End Instance
**
*Nset, nset=Set-1, instance=Part-1-1, generate
   1,  254,   11
*Elset, elset=Set-1, instance=Part-1-1, generate
   1,  131,   10
*Elset, elset=_Surf-1_S4, internal, instance=Part-1-1, generate
  10,  140,   10
*Surface, type=ELEMENT, name=Surf-1
_Surf-1_S4, S4
*End Assembly
**
** MATERIALS
**
*Material, name=Material-1
*Depvar
      7,
*User Material, constants=11
163586., 9000., 9000., 0.315, 0.315, 0.403, 4972., 4972.
 3208., 1e+06,  0.01
** ----------------------------------------------------------------
**
** STEP: Step-1
**
*Step, name=Step-1, nlgeom=NO
*Static
1., 1., 1e-05, 1.
**
** BOUNDARY CONDITIONS
**
** Name: BC-1 Type: Symmetry/Antisymmetry/Encastre
*Boundary
Set-1, ENCASTRE
**
** LOADS
**
** Name: Load-1   Type: Pressure
*Dsload
Surf-1, P, -1000.
**
** OUTPUT REQUESTS
**
*Restart, write, frequency=0
**
** FIELD OUTPUT: F-Output-1
**
*Output, field, variable=PRESELECT
**
** HISTORY OUTPUT: H-Output-1
**
*Output, history, variable=PRESELECT
*End Step
** ----------------------------------------------------------------
**
** STEP: Step-2
**
*Step, name=Step-2, nlgeom=NO, inc=1000
*Static
0.1, 1., 1e-05, 0.1
**
** OUTPUT REQUESTS
**
*Restart, write, frequency=0
**
** FIELD OUTPUT: F-Output-1
**
*Output, field
*Node Output
RF, U
*Element Output, directions=YES
E, S
**
** FIELD OUTPUT: F-Output-2
**
*Element Output, directions=YES
SDV,
**
** HISTORY OUTPUT: H-Output-1
**
*Output, history, variable=PRESELECT
**
** HISTORY OUTPUT: H-Output-2
**
*Output, history
*Element Output, elset=Set-1
SDV,
**
*End Step
